z(x, y) := -25/34*x - 15/34*y + 190/17
φ(x, y) := x^2 + y^2 - 12*x + 8*y + 18
L(x, y, λ) := -25/34*x - 15/34*y + 190/17 + λ*(x^2 + y^2 - 12*x + 8*y + 18)
dfx(x, y, λ) := d/dx(L(x, y, λ)) → -25/34 + (2*λ*x - 12*λ)
dfy(x, y, λ) := d/dy(L(x, y, λ)) → 2*λ*y + (8*λ - 15/34)
dfx2(x, y, λ) := d/dx(dfx(x, y, λ)) → 2*λ
dfy2 := d/dy(dfy(x, y, λ)) → 2*λ
dfxy := d/dy(dfx(x, y, λ)) → 0
d2L(x, y, λ) := dfx2(x, y, λ) + dfxy + dfy2 → 4*λ
solve block
    # guess values
    x := 100
    y := 1
    λ := -1
    # constraints
    -25/34 + (2*λ*x - 12*λ) == 0
    2*λ*y + (8*λ - 15/34) == 0
    x^2 + y^2 - 12*x + 8*y + 18 < 0
    # solver
    S := find(x, y, λ)
    S = [11; -1; 0.0735294]
end solve block
solve block
    # guess values
    x := 1
    y := 1
    λ := -1
    # constraints
    -25/34 + (2*λ*x - 12*λ) == 0
    2*λ*y + (8*λ - 15/34) == 0
    x^2 + y^2 - 12*x + 8*y + 18 < 0
    # solver
    S2 := find(x, y, λ)
    S2 = [1; -7; -0.0735294]
end solve block
d2L(S[0], S[1], S[2]) = 0.294118
d2L(S2[0], S2[1], S2[2]) = -0.294118
z(S[0], S[1]) = 3.52941
z(S2[0], S2[1]) = 13.5294
